# 1.
# a)
0.0000000456 = 4.56e-8
# f)
0.46*10^17 = 4.6e16
# b)
256000000000 = 256000000000
# g)
0.732*10^-6 = 7.32e-7
# c)
0.000678 = 0.000678
# h)
456000 = 456000
# d)
245*10^-8 = 2.45e-6
# i)
0.00876*10^15 = 8760000000000
# e)
356.4*10^12 = 356400000000000
# j)
0.00007895 = 7.895e-5
2.
# a)
165 km/hr = 45.8333 m/s
# c)
128 ft/s = 87.2727 mi/hr
# f)
456*10^-1 m^3 = 45.6 m^3
# b)
5 m^3 = 5000000 cm^3
# d)
123 mm/s = 0.4428 km/hr
# g)
1440° = 25.1327 rad
3.
# a)
20*10^5 km/hr = 555556 m/s
# h)
2*10^3 kg/m^3 = 2 gm/cm^3
# b)
8*10^5 L = 800000000 cm^3
# i)
85*10^4 ft/s = 579545 mi/hr
# c)
5*10^8 mm^3 =  # error: This variable is undefined. Check that the label is set correctly.
# j)
85*10^8 cm^2 = 850000 m^2
# d)
3*10^5 gm = 0.330693 ton
# k)
62*10^8 s = 71759.3 day
# e)
2*10^4 m/s = 72000 km/hr
# l)
4*10^-2 km = 40000 mm
# f)
4*10^2 gm/cm^3 = 400000 kg/m^3
# m)
3*10^3 ton = 2721554 kg
# g)
6*10^4 mm^3 = 0.06 L
# o)
3*10^4 m/s^2 = 3000000 cm/s^2
1 ton = 907185 gm
0.3 = 30*10^-2
